#include "JointsLimits_template.any"

#include "<ANYBODY_PATH_INSTALLDIR>/AMMR/Application/libdef.any"


Main = {

  //#path BM_MANNEQUIN_FILE "Mannequin.any"
  // Include the HumanModel from the repository
  #define BM_ARM_RIGHT OFF
  #define BM_TRUNK_NECK OFF

  #include "<ANYBODY_PATH_BODY>/HumanModel.any"

  AnyBodyStudy Study = {
     AnyFolder &model = .HumanModel.BodyModelWithDefaultDrivers;
     Gravity = {0.0, -9.81, 0};

     CreateJointLimitDrivers JointLimits(
              ARM_RIGHT = BM_ARM_RIGHT,
              ARM_LEFT = BM_ARM_LEFT,
              LEG_RIGHT = BM_LEG_RIGHT,
              LEG_LEFT = BM_LEG_LEFT,
              TRUNK_NECK = BM_TRUNK_NECK
      )= {};

  };


};// Main
